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/batch
! ANSYS input file written by Workbench version 2020 R1
! File used for geometry attach: C:\Users\cbellot\Documents\Cyclique\Workbench\diff1\diff1_files\dp0\SYS\DM\SYS.scdoc
/title,diff1--Modal (A5)
/com,--- Data in consistent MKS units. See Solving Units in the help system for more information.
/units,MKS
/prep7
! Turn off shape checking because checks already performed inside WB mesher.
! See help system for more information.
SHPP,OFF,,NOWARN
etcon,set             ! allow ANSYS to choose best KEYOP's for 180x elements
/com,*********** Nodes for the whole assembly ***********
nblock,3,,35
(1i9,3e20.9e3)
        1     9.111762354E-04     0.000000000E+00    -1.162077513E-02
        2    -8.980038569E-04     0.000000000E+00    -1.162198072E-02
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-1
/com,*********** Elements for Body 1 "SYS\Solid" ***********
et,1,185
eblock,19,solid,,9
(19i9)
        1        1        1        1        0        0        0        0        8        0        1        4       21       22       32        5       18       17        9
        1        1        1        1        0        0        0        0        8        0        2        2        4       32       31        7        5        9       10
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-1
/com,*********** Send User Defined Coordinate System(s) ***********
local,12,1,0.,0.,0.,-90.,0.,-90.
csys,0
toffst,273.15,  ! Temperature offset from absolute zero
/com,*********** Set Reference Temperature ***********
tref,22.
/com,*********** Send Materials ***********
Temperature = 'TEMP' ! Temperature
MP,DENS,1,7850,	! kg m^-3
MP,ALPX,1,1.2e-05,	! C^-1
MP,C,1,434,	! J kg^-1 C^-1
MP,KXX,1,60.5,	! W m^-1 C^-1
MP,RSVX,1,1.7e-07,	! kg m^3 A^-2 s^-3
MP,EX,1,200000000000,	! Pa
MP,NUXY,1,0.3,
MP,MURX,1,10000,

!************************* Model Summary ********************
!SYS\Solid,	Structural Steel,	matid,	1
!************************* End Model Summary ********************
CMBLOCK,_CM41_FIXEDSU,NODE,        8
(8i10)
        11        12        13        14        27        28        29        30

/com,*********** Fixed Supports ***********
CMBLOCK,_FIXEDSU,NODE,        8
(8i10)
        11        12        13        14        27        28        29        30

cmsel,s,_FIXEDSU
d,all,all
nsel,all
/com,*********** Node Rotations ***********
nmod,9,,,,0.,0.,24.
nmod,10,,,,0.,0.,24.
nmod,17,,,,0.,0.,24.
nmod,22,,,,0.,0.,24.
nmod,31,,,,0.,0.,24.
nmod,32,,,,0.,0.,24.
/com,*********** Create Periodic/Cyclic Symmetry ***********
CYCOPT,USRROT,1
CYCOPT,STATUS
*DIM,_CYCLICMAP,ARRAY,2,8
*SET,_CYCLICMAP(1,1),14,12
*SET,_CYCLICMAP(1,2),15,10
*SET,_CYCLICMAP(1,3),16,9
*SET,_CYCLICMAP(1,4),19,17
*SET,_CYCLICMAP(1,5),24,22
*SET,_CYCLICMAP(1,6),25,31
*SET,_CYCLICMAP(1,7),26,32
*SET,_CYCLICMAP(1,8),27,30
CYCLIC,15,,12,,,_CYCLICMAP
CYCOPT,MSUP,NO
fini
/solu
antype,2                   ! modal analysis
_thickRatio=  0     ! Ratio of thick parts in the model
modopt,lanb,6
outres,erase
outres,all,none
outres,nsol,all
outres,eangl,all
outres,etmp,all
outres,veng,all
outres,strs,all
outres,epel,all
outres,eppl,all
outres,rsol,all
cmsel,s,_nodes_fixedsu_disp
esln
cm,_ConstrainedNodes,elem  ! -- reduced set with only constrained nodes
nsel,all
esel,all
outres,nload,all,_ConstrainedNodes  !-- reduced set with only constrained nodes
outres,cont,all
mxpand,,,,yes,,no             ! expand element results for stress/strains, but not write them to file.mode
CYCOPT,MSUP,0
dmpopt,esav,no
dmpopt,emat,no
dmpopt,full,no
! ****** Begin Command Snippet ******
!   Commands inserted into this file will be executed just prior to the ANSYS SOLVE command.
!   These commands may supersede command settings set by Workbench.

!   Active UNIT system in Workbench when this object was created:  Metric (m, kg, N, s, V, A)
!   NOTE:  Any data that requires units (such as mass) is assumed to be in the consistent solver unit system.
!                See Solving Units in the help system for more information.

/prep7
CYCOPT,MSUP,1
finish
/solu
! ****** End   Command Snippet ******
! *********** WB SOLVE COMMAND ***********
! check interactive state
*get,ANSINTER_,active,,int
*if,ANSINTER_,ne,0,then
/eof
*endif
solve
/com *************** Write FE CONNECTORS *********
CEWRITE,file,ce,,INTE
*get,_nmodalsolproc,active,0,numcpu
fini
save,file,db
/post1
fini
